x_0 := 2.14715
x_1 := 3.64715
x_0_int := round(x_0) → 2
x_1_int := round(x_1) → 4
y_0 := 0.47057
y_1 := 0.47057
y_0_int := round(y_0) → 0
y_1_int := round(y_1) → 0
dy := y_1_int - y_0_int → 0
dx := x_1_int - x_0_int → 2
(|dy| ≤ |dx|) and (x_1_int > x_0_int) → 1
(|dy| > |dx|) and (y_1_int > y_0_int) → 0
slope := dy/dx float → 0.0
x_0 := 1.81549
x_1 := 3.62763
x_0_int := round(x_0) → 2
x_1_int := round(x_1) → 4
y_0 := 1.02138
y_1 := 1.65096
y_0_int := round(y_0) → 1
y_1_int := round(y_1) → 2
dy := y_1_int - y_0_int → 1
dx := x_1_int - x_0_int → 2
(|dy| ≤ |dx|) and (x_1_int > x_0_int) → 1
(|dy| > |dx|) and (y_1_int > y_0_int) → 0
slope := dy/dx float → 0.5
x_0 := 0.94892
x_1 := 8.55611
x_0_int := round(x_0) → 1
x_1_int := round(x_1) → 9
y_0 := 2.07485
y_1 := 17.03125
y_0_int := round(y_0) → 2
y_1_int := round(y_1) → 17
dy := y_1_int - y_0_int → 15
dx := x_1_int - x_0_int → 8
(|dy| ≤ |dx|) and (x_1_int > x_0_int) → 0
(|dy| > |dx|) and (y_1_int > y_0_int) → 1  # Линия второго класса - инкремент по Y
slope := dy/dx float → 1.875
slope' := dx/dy float → 0.533333333333
x_0 := 0.5
x_1 := 0.5
x_0_int := round(x_0) → 1
x_1_int := round(x_1) → 1
y_0 := 2
y_1 := 7.5
y_0_int := round(y_0) → 2
y_1_int := round(y_1) → 8
dy := y_1_int - y_0_int → 6
dx := x_1_int - x_0_int → 0
(|dy| ≤ |dx|) and (x_1_int > x_0_int) → 0
(|dy| > |dx|) and (y_1_int > y_0_int) → 1
slope := dy/dx  # error: Division by zero error.  # Вертикальная линия
slope' := dx/dy float → 0.0
x_0 := -0.8505
x_1 := -5.81278
x_0_int := round(x_0) → -1
x_1_int := round(x_1) → -6
y_0 := 1.64894
y_1 := 14.40616
y_0_int := round(y_0) → 2
y_1_int := round(y_1) → 14
dy := y_1_int - y_0_int → 12
dx := x_1_int - x_0_int → -5
(|dy| ≤ |dx|) and (x_1_int > x_0_int) → 0
(|dy| > |dx|) and (y_1_int > y_0_int) → 1  # Линия второго класса - инкремент по Y
slope := dy/dx float → -2.4
slope' := dx/dy float → -0.416666666667
x_0 := -5
x_1 := -15
x_0_int := round(x_0) → -5
x_1_int := round(x_1) → -15
y_0 := 5
y_1 := 15
y_0_int := round(y_0) → 5
y_1_int := round(y_1) → 15
dy := y_1_int - y_0_int → 10
dx := x_1_int - x_0_int → -10
(|dy| ≤ |dx|) and (x_1_int > x_0_int) → 0  # Линия задана справа налево - требуется своп точек
(|dy| > |dx|) and (y_1_int > y_0_int) → 0
x_0 := -15
x_1 := -5
x_0_int := round(x_0) → -15
x_1_int := round(x_1) → -5
y_0 := 15
y_1 := 5
y_0_int := round(y_0) → 15
y_1_int := round(y_1) → 5
dy := y_1_int - y_0_int → -10
dx := x_1_int - x_0_int → 10
(|dy| ≤ |dx|) and (x_1_int > x_0_int) → 1  # Линия первого класса - инкремент по X
(|dy| > |dx|) and (y_1_int > y_0_int) → 0
slope := dy/dx float → -1.0
slope' := dx/dy float → -1.0
x_0 := -1.4419
x_1 := -12.96741
x_0_int := round(x_0) → -1
x_1_int := round(x_1) → -13
y_0 := 0.66912
y_1 := 6.70705
y_0_int := round(y_0) → 1
y_1_int := round(y_1) → 7
dy := y_1_int - y_0_int → 6
dx := x_1_int - x_0_int → -12
(|dy| ≤ |dx|) and (x_1_int > x_0_int) → 0  # Линия задана справа налево - требуется своп точек
(|dy| > |dx|) and (y_1_int > y_0_int) → 0
x_0 := -12.96741
x_1 := -1.4419
x_0_int := round(x_0) → -13
x_1_int := round(x_1) → -1
y_0 := 6.70705
y_1 := 0.66912
y_0_int := round(y_0) → 7
y_1_int := round(y_1) → 1
dy := y_1_int - y_0_int → -6
dx := x_1_int - x_0_int → 12
(|dy| ≤ |dx|) and (x_1_int > x_0_int) → 1  # Линия первого класса - инкремент по X
(|dy| > |dx|) and (y_1_int > y_0_int) → 0
slope := dy/dx float → -0.5
slope' := dx/dy float → -2.0
x_0 := -8.226
x_1 := -22.2464
x_0_int := round(x_0) → -8
x_1_int := round(x_1) → -22
y_0 := 0
y_1 := 0
y_0_int := round(y_0) → 0
y_1_int := round(y_1) → 0
dy := y_1_int - y_0_int → 0
dx := x_1_int - x_0_int → -14
(|dy| ≤ |dx|) and (x_1_int > x_0_int) → 0  # Линия задана справа налево - требуется своп
(|dy| > |dx|) and (y_1_int > y_0_int) → 0
x_0 := -22.2464
x_1 := -8.226
x_0_int := round(x_0) → -22
x_1_int := round(x_1) → -8
y_0 := 0
y_1 := 0
y_0_int := round(y_0) → 0
y_1_int := round(y_1) → 0
dy := y_1_int - y_0_int → 0
dx := x_1_int - x_0_int → 14
(|dy| ≤ |dx|) and (x_1_int > x_0_int) → 1  # Линия первого класса - инкремент по X
(|dy| > |dx|) and (y_1_int > y_0_int) → 0
slope := dy/dx float → 0.0
slope' := dx/dy float →  # error: Division by zero error.
x_0 := -1.42654
x_1 := -17.9893
x_0_int := round(x_0) → -1
x_1_int := round(x_1) → -18
y_0 := -0.85331
y_1 := -5.21855
y_0_int := round(y_0) → -1
y_1_int := round(y_1) → -5
dy := y_1_int - y_0_int → -4
dx := x_1_int - x_0_int → -17
(|dy| ≤ |dx|) and (x_1_int > x_0_int) → 0  # Линия задана справа налево - требуется своп
(|dy| > |dx|) and (y_1_int > y_0_int) → 0
x_0 := -17.9893
x_1 := -1.42654
x_0_int := round(x_0) → -18
x_1_int := round(x_1) → -1
y_0 := -5.21855
y_1 := -0.85331
y_0_int := round(y_0) → -5
y_1_int := round(y_1) → -1
dy := y_1_int - y_0_int → 4
dx := x_1_int - x_0_int → 17
(|dy| ≤ |dx|) and (x_1_int > x_0_int) → 1  # Линия первого класса - инкремент по X
(|dy| > |dx|) and (y_1_int > y_0_int) → 0
slope := dy/dx float → 0.235294117647
slope' := dx/dy float → 4.25
x_0 := -5
x_1 := -12
x_0_int := round(x_0) → -5
x_1_int := round(x_1) → -12
y_0 := -5
y_1 := -12
y_0_int := round(y_0) → -5
y_1_int := round(y_1) → -12
dy := y_1_int - y_0_int → -7
dx := x_1_int - x_0_int → -7
(|dy| ≤ |dx|) and (x_1_int > x_0_int) → 0  # Линия задана справа налево - требуется своп
(|dy| > |dx|) and (y_1_int > y_0_int) → 0
x_0 := -12
x_1 := -5
x_0_int := round(x_0) → -12
x_1_int := round(x_1) → -5
y_0 := -12
y_1 := -5
y_0_int := round(y_0) → -12
y_1_int := round(y_1) → -5
dy := y_1_int - y_0_int → 7
dx := x_1_int - x_0_int → 7
(|dy| ≤ |dx|) and (x_1_int > x_0_int) → 1  # Линия первого класса - инкремент по X
(|dy| > |dx|) and (y_1_int > y_0_int) → 0
slope := dy/dx float → 1.0
slope' := dx/dy float → 1.0
x_0 := -0.66344
x_1 := -8.68639
x_0_int := round(x_0) → -1
x_1_int := round(x_1) → -9
y_0 := -1.51963
y_1 := -15.49434
y_0_int := round(y_0) → -2
y_1_int := round(y_1) → -15
dy := y_1_int - y_0_int → -13
dx := x_1_int - x_0_int → -8
(|dy| ≤ |dx|) and (x_1_int > x_0_int) → 0
(|dy| > |dx|) and (y_1_int > y_0_int) → 0  # Линия задана сверху вниз - требуется своп
x_0 := -8.68639
x_1 := -0.66344
x_0_int := round(x_0) → -9
x_1_int := round(x_1) → -1
y_0 := -15.49434
y_1 := -1.51963
y_0_int := round(y_0) → -15
y_1_int := round(y_1) → -2
dy := y_1_int - y_0_int → 13
dx := x_1_int - x_0_int → 8
(|dy| ≤ |dx|) and (x_1_int > x_0_int) → 0
(|dy| > |dx|) and (y_1_int > y_0_int) → 1  # Линия второго класса - инкремент по Y
slope := dy/dx float → 1.625
slope' := dx/dy float → 0.615384615385
x_0 := 0.52943
x_1 := -3.7053
x_0_int := round(x_0) → 1
x_1_int := round(x_1) → -4
y_0 := -1.17598
y_1 := -16.18403
y_0_int := round(y_0) → -1
y_1_int := round(y_1) → -16
dy := y_1_int - y_0_int → -15
dx := x_1_int - x_0_int → -5
(|dy| ≤ |dx|) and (x_1_int > x_0_int) → 0
(|dy| > |dx|) and (y_1_int > y_0_int) → 0  # Линия задана сверху вниз - требуется своп
x_0 := -3.7053
x_1 := 0.52943
x_0_int := round(x_0) → -4
x_1_int := round(x_1) → 1
y_0 := -16.18403
y_1 := -1.17598
y_0_int := round(y_0) → -16
y_1_int := round(y_1) → -1
dy := y_1_int - y_0_int → 15
dx := x_1_int - x_0_int → 5
(|dy| ≤ |dx|) and (x_1_int > x_0_int) → 0
(|dy| > |dx|) and (y_1_int > y_0_int) → 1  # Линия второго класса - инкремент по Y
slope := dy/dx float → 3.0
slope' := dx/dy float → 0.333333333333
x_0 := 1.31772
x_1 := 10.16512
x_0_int := round(x_0) → 1
x_1_int := round(x_1) → 10
y_0 := -2.10619
y_1 := -22.39123
y_0_int := round(y_0) → -2
y_1_int := round(y_1) → -22
dy := y_1_int - y_0_int → -20
dx := x_1_int - x_0_int → 9
(|dy| ≤ |dx|) and (x_1_int > x_0_int) → 0
(|dy| > |dx|) and (y_1_int > y_0_int) → 0  # Линия задана сверху вниз - требуется своп
x_0 := 10.16512
x_1 := 1.31772
x_0_int := round(x_0) → 10
x_1_int := round(x_1) → 1
y_0 := -22.39123
y_1 := -2.10619
y_0_int := round(y_0) → -22
y_1_int := round(y_1) → -2
dy := y_1_int - y_0_int → 20
dx := x_1_int - x_0_int → -9
(|dy| ≤ |dx|) and (x_1_int > x_0_int) → 0
(|dy| > |dx|) and (y_1_int > y_0_int) → 1  # Линия второго класса - инкремент по Y
slope := dy/dx float → -2.22222222222
slope' := dx/dy float → -0.45
x_0 := 1.71092
x_1 := 3.37499
x_0_int := round(x_0) → 2
x_1_int := round(x_1) → 3
y_0 := -0.64989
y_1 := -1.43225
y_0_int := round(y_0) → -1
y_1_int := round(y_1) → -1
dy := y_1_int - y_0_int → 0
dx := x_1_int - x_0_int → 1
(|dy| ≤ |dx|) and (x_1_int > x_0_int) → 1  # Линия первого класса - инкремент по X
(|dy| > |dx|) and (y_1_int > y_0_int) → 0
dy := y_1_int - y_0_int → 0
dx := x_1_int - x_0_int → 1
slope := dy/dx float → 0.0
slope' := dx/dy float →  # error: Division by zero error.
